*Heading
** Job name: TDS_Exp Model name: TDS_Paper_Emilio
** Generated by: Abaqus/CAE 2023
*Preprint, echo=NO, model=NO, history=NO, contact=NO
**
** PARTS
**
*Part, name=Sample
*Node
      1,           0.,           0.
      2, 0.00249999994,           0.
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*Element, type=DC2D8
  1,    1,    2,  203,  202,  403,  404,  405,  406
  2,    2,    3,  204,  203,  407,  408,  409,  404
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*Nset, nset=Set-1, generate
    1,  1003,     1
*Elset, elset=Set-1, generate
   1,  200,    1
** Section: Steel
*Solid Section, elset=Set-1, material=Steel
1.,
*End Part
**
**
** ASSEMBLY
**
*Assembly, name=Assembly
**
*Instance, name=Sample-1, part=Sample
*End Instance
**
*Elset, elset=CentralEl, instance=Sample-1
 1,
*Nset, nset=Surface, instance=Sample-1
  201,  402, 1002
*Elset, elset=Surface, instance=Sample-1
 200,
*Elset, elset=_Surface_S2, internal, instance=Sample-1
 200,
*Surface, type=ELEMENT, name=Surface
_Surface_S2, S2
**
** INTEGRATED OUTPUT SECTIONS
**
*Integrated Output Section, name=Surface, surface=Surface, project orientation=NO
*End Assembly
*Amplitude, name=H_Conc, time=TOTAL TIME
             0.,              0.,              1.,              1.,         20000.,              1.,        20000.01,              0.
        200000.,              0.
*Amplitude, name=Heating
             0.,              1.,            289.5,              2.96838,            1000.,              2.96838
**
** MATERIALS
**
*include, input=MaterialFile_TDS_TwoTraps2.inc
**
** PREDEFINED FIELDS
**
** Name: PrescribedTemp   Type: Field
*Initial Conditions, type=FIELD, variable=1
Sample-1.Set-1, 294.15
** ----------------------------------------------------------------
**
** STEP: Charge
**
*Step, name=Charge, nlgeom=NO, inc=10000000
*Heat Transfer, end=PERIOD, deltmx=5e+12
1e-05, 20000., 1e-20, 500.,
**
** BOUNDARY CONDITIONS
**
** Name: H_Surface Type: Temperature
*Boundary, amplitude=H_Conc
Surface, 11, 11, 6.022e+13
**
** OUTPUT REQUESTS
**
*Restart, write, frequency=0
**
** FIELD OUTPUT: F-Output-1
**
*Output, field, number interval=100
*Node Output
NT, RFL
*Element Output, directions=YES
FV,HFL, SDV
**
** HISTORY OUTPUT: Flux
**
*Output, history
*Integrated Output, section=Surface
SOH,
**
** HISTORY OUTPUT: CentralEl
**
*Element Output, elset=CentralEl
HFL1, SDV, TEMP, FV
*End Step
** ----------------------------------------------------------------
**
** STEP: TDS
**
*Step, name=TDS, nlgeom=NO, inc=1000000000
*Heat Transfer, end=PERIOD, deltmx=5e+11
1e-10, 300., 1e-20, 0.5,
**
** PREDEFINED FIELDS
**
** Name: PrescribedTemp   Type: Field
*Field, variable=1, amplitude=Heating
Sample-1.Set-1, 294.15
**
** OUTPUT REQUESTS
**
*Restart, write, frequency=0
**
** FIELD OUTPUT: F-Output-1
**
*Output, field, number interval=100
*Node Output
NT, RFL
*Element Output, directions=YES
FV,HFL, SDV
**
** HISTORY OUTPUT: Flux
**
*Output, history
*Integrated Output, section=Surface
SOH,
**
** HISTORY OUTPUT: CentralEl
**
*Element Output, elset=CentralEl
HFL1, SDV, TEMP, FV
*End Step
