**************** UNITS: SI (m) ****************
**
** Length: m
** Time: s
** Force: N
** Stress: Pa
** Mass: kg = (N*s^2)/m
** Density: kg/m^3
**
************************************************
*Heading
** Job name: FNR3_full Model name: FNR3_full
** Generated by: Abaqus/CAE 2023.HF4
*Preprint, echo=NO, model=NO, history=NO, contact=NO
**
** PARTS
**
*Part, name=PSR3
********************************************
*INCLUDE, INPUT=nodes
********************************************
***********************************************
*INCLUDE, INPUT=elements
***********************************************
*Nset, nset=whole_part, generate
1,  96142,      1
*Elset, elset=whole_part, generate
1,  88280,      1
** Section: Section-1
*Solid Section, elset=whole_part, material=Material-1
,
*End Part
**
**
** ASSEMBLY
**
*Assembly, name=Assembly
**
*Instance, name=PSR3-1, part=PSR3
*End Instance
**
*Elset, elset=ALLE, instance=PSR3-1, generate
1,  88280,      1
*Nset, nset=ALLN, instance=PSR3-1, generate
1,  96142,      1
*Nset, nset=all_surf, instance=PSR3-1
1,     3,     5,    18,    25,    32
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*Elset, elset=all_surf, instance=PSR3-1
1,     2,     3,     4,     5,     6
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*Nset, nset=bottom_surf, instance=PSR3-1
4,   13,   14,   15,   16,   17
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*Elset, elset=bottom_surf, instance=PSR3-1
41,   42,   43,   44,   45,   46
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*Nset, nset=top_surf, instance=PSR3-1
2805, 2806, 2807, 2808, 2809, 2810
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*Elset, elset=top_surf, instance=PSR3-1
1961, 1962, 1963, 1964, 1965, 1966
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*End Assembly
*Amplitude, name=constant
0.,              1.,            100.,              1.
*Amplitude, name=ramp
0.,              0.,            100.,              1.
**
** MATERIALS
**
*Material, name=Material-1
*Density
1.4537037037037037e-11,
*Depvar
  38,
1, AR1_EBARP, AR1_EBARP
2, AR2_YFLAG, AR2_YFLAG
3, AR3_CL, AR3_CL
4, AR4_CT, AR4_CT
5, AR5_GRADPX, AR5_GRADPX
6, AR6_GRADPY, AR6_GRADPY
7, AR7_CTOTAL, AR7_CTOTAL
8, AR8_CL0, AR8_CL0
9, AR9_DD, AR9_DD
10, AR10_AIDD, AR10_AIDD
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38, AR38_DSTAR, AR38_DSTAR
*User Material, constants=32, type=THERMAL
**
** =============================
**
** HYDROGEN DIFFUSION PROPERTIES
**
** <AE>, <POISSON>, <SIG0>, <EXPO>, <AE0>, <C0>, <D>, <VH>
407.4074074074074, 0.3, 1, 10, 0.0024545454545454545, 0, 0.0005, 0.43298373905513327
** <KT>, <ALPHA>, <NL>, <BETA>, <LAMBDA>, <EPCL>, <SC>, <C1>
2.8e-10, 1, 40600464.55377882, 1, 0.281, 0.03, 7.5, 0.4
** <C2>, <C3>, <C4>, <ETAC>, <GF>, <D1>, <D2>, <D3>
2.266, 0.1, 1.131, -0.33, 6.65, 0.37, 0.5449, 0.85
** <D4>, <RHO0>, <ALFREQ>, <SFD>, <P0>, <AMU0>, <EBARDOT0>, none
0.3926, 1.4537037037037037e-11, 1184490, 1, 0, 0, 0.09999999999999999, 0.0
**
*******************************************************
*User Material, constants=32, type=MECHANICAL
**
** =====================
**
** MECHANICAL PROPERTIES
**
** <AE>, <POISSON>, <SIG0>, <EXPO>, <AE0>, <C0>, <D>, <VH>
407.4074074074074, 0.3, 1, 10, 0.0024545454545454545, 2083720000000000000000, 0.0005, 0.43298373905513327
** <KT>, <ALPHA>, <NL>, <BETA>, <LAMBDA>, <EPCL>, <SC>, <C1>
2.8e-10, 1, 40600464.55377882, 1, 0.281, 0.03, 7.5, 0.4
** <C2>, <C3>, <C4>, <ETAC>, <GF>, <D1>, <D2>, <D3>
2.266, 0.1, 1.131, -0.33, 6.65, 0.37, 0.5449, 0.85
** <D4>, <RHO0>, <ALFREQ>, <SFD>, <P0>, <AMU0>, <EBARDOT0>, none
0.3926, 1.4537037037037037e-11, 1184490, 1, 0, 0, 0.09999999999999999, 0.0
**
**
******** INITIAL CONDITIONS ********
**
*Initial Conditions, Type=Solution
ALLE, 0.0, 0.0, 0.001, 0.0, 0.0, 0.0, 0.0
0.0, 0.0, 0.0, 0.0, 0.0, 1.0, 0.0, 0.0
0.0, 0.0, 0.0, 0.0, 0.0, 0.0, 0.0, 1.4537037037037037e-11
0.0, 0.0, 0.0, 0.0, 0.0, 0.0, 7.5, 0.0
0.0, 0.0, 0.09999999999999999, 0.0, 0.0, 0.0
******************************
**
** BOUNDARY CONDITIONS
**
** Name: bottom_fix Type: Symmetry/Antisymmetry/Encastre
*Boundary
bottom_surf, PINNED
**
** PREDEFINED FIELDS
**
** Name: predefined_field_hydrogen   Type: Temperature
*Initial Conditions, type=TEMPERATURE
all_surf, 0.
** ----------------------------------------------------------------
**
** STEP: step1_insitu_gas_charging
**
*Step, name=step1_insitu_gas_charging, nlgeom=YES
*Coupled Temperature-displacement, creep=none, deltmx=100.
100., 100., 0.001, 100.
**
** BOUNDARY CONDITIONS
**
** Name: hydrogen_charging Type: Temperature
*Boundary, amplitude=constant
all_surf, 11, 11, 0.11
** Name: top_displacement Type: Displacement/Rotation
*Boundary, amplitude=ramp
top_surf, 2, 2, 0.001
**
** PREDEFINED FIELDS
**
** Name: predefined_field_ufield   Type: Field
*Field, variable=1, user
ALLN
*CONTROLS, PARAMETERS=FIELD, FIELD=TEMPERATURE
 , , 1.184E-07
**
** OUTPUT REQUESTS
**
*Restart, write, frequency=0
**
** FIELD OUTPUT: F-Output-1
**
*Output, field, number interval=100
*Node Output
NT, RF, U
*Element Output, directions=YES
HFL, LE, S, SDV, STATUS
*Output, history, frequency=0
*End Step
