*Heading
** Job name: cavity Model name: Model-1
*Preprint, echo=NO, model=NO, history=NO, contact=NO
**
** PARTS
**
*Part, name=Part-3
*End Part
**
** ASSEMBLY
**
*Assembly, name=Assembly
**
*Instance, name=Part-3-1, part=Part-3
*Node
      1,          10.,           0.,          20.
      2,          10.,           0.,          10.
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*Element, type=C3D8
  1,  351,  352, 1172, 1169,   33,   34,  322,  321
  2,  352,  353, 1171, 1172,   34,   35,  323,  322
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** Region: (Section-1:Picked)
*Elset, elset=_PickedSet2, internal, generate
    1,  1256,     1
** Section: Section-1
*Solid Section, elset=_PickedSet2, material=Material-1
1.,
*End Instance
*Nset, nset=front, instance=Part-3-1
    1,    2,    3,    4,    5,    6
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*Elset, elset=front, instance=Part-3-1
    1,    2,    3,    4,    5,    6
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*Nset, nset=back, instance=Part-3-1
    2,    3,    5,    8,    9,   11
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*Elset, elset=back, instance=Part-3-1
  158,  159,  160,  161,  162,  163
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*Nset, nset=_PickedSet12, internal, instance=Part-3-1
  17,  18,  19,  20,  21,  22
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*Elset, elset=_PickedSet12, internal, instance=Part-3-1
 411, 412, 413, 414, 415, 416
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*Nset, nset=_PickedSet13, internal, instance=Part-3-1
    3,    4,    9,   10,   11,   12
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*Elset, elset=_PickedSet13, internal, instance=Part-3-1
   21,   22,   23,   24,   25,  138
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*Nset, nset=all, instance=Part-3-1, generate
    1,  1760,     1
*Elset, elset=all, instance=Part-3-1, generate
    1,  1256,     1
*Nset, nset="cavity face", instance=Part-3-1
    5,    6,    8,   13,   16,   23
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*nset,nset=QA_TEST_CAVITY_FACE
"cavity face"
*Elset, elset="cavity face", instance=Part-3-1
   26,   27,   28,   29,   34,   35
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*End Assembly
**
** MATERIALS
**
*Material, name=Material-1
*Elastic
1000., 0.3
*Plastic
 100.,0.
1000.,1.
** ----------------------------------------------------------------
**
** STEP: Step-1
**
*Step, name=Step-1, nlgeom=YES
*Static
0.1, 1., 1e-05, 0.2
**
** BOUNDARY CONDITIONS
**
** Name: BC-1 Type: Symmetry/Antisymmetry/Encastre
*Boundary
_PickedSet12, ENCASTRE
** Name: BC-2 Type: Displacement/Rotation
*Boundary
_PickedSet13, 2, 2, -5.
*Output, field
*Output, history
**
*End Step
** ----------------------------------------------------------------
**
** STEP: Step-2
**
*Step, name=Step-2, nlgeom=YES
*Static
1., 1., 1e-05, 1.
**
** BOUNDARY CONDITIONS
**
** Name: BC-1 Type: Symmetry/Antisymmetry/Encastre
*Boundary, op=NEW
_PickedSet12, ENCASTRE
** Name: BC-2 Type: Displacement/Rotation
*Boundary, op=NEW
*Output, field
*Output, history
**
*End Step
** ----------------------------------------------------------------
**
** STEP: Step-3
**
*Step, name=Step-3, nlgeom=YES
*Static
0.05, 1., 1e-05, 0.05
**
** OUTPUT REQUESTS
**
** FIELD OUTPUT: F-Output-1
**
*Output, field
*element output
PEEQ,
*node output
U,
*node output,nset=QA_TEST_CAVITY_FACE
U,
**
*adaptive mesh,elset=all,freq=1,mesh sweep=2
*adaptive mesh constraint,type=velocity,user
"cavity face",1,,10.
*End Step
