**************** UNITS: SI (m) ****************
**
** Length: m
** Time: s
** Force: N
** Stress: Pa
** Mass: kg = (N*s^2)/m
** Density: kg/m^3
**
************************************************
*Heading
** Job name: elastic_plate_3D Model name: elastic_plate_3D
** Generated by: Abaqus/CAE 2023.HF4
*Preprint, echo=NO, model=NO, history=NO, contact=NO
**
** PARTS
**
*Part, name=elastic-hold-plate
********************************************
*INCLUDE, INPUT="processing_input/nodes.inc"
********************************************
***********************************************
*INCLUDE, INPUT="processing_input/elements.inc"
***********************************************
*Nset, nset=Set-1, generate
1,  4836,     1
*Elset, elset=Set-1, generate
1,  3026,     1
** Section: Section-1
*Solid Section, elset=Set-1, material=thermomechanical
,
*End Part
**
**
** ASSEMBLY
**
*Assembly, name=Assembly
**
*Instance, name=elastic-hold-plate-1, part=elastic-hold-plate
*End Instance
**
*Nset, nset=whole_part, instance=elastic-hold-plate-1, generate
1,  4836,     1
*Elset, elset=whole_part, instance=elastic-hold-plate-1, generate
1,  3026,     1
*Nset, nset=xsymm_side, instance=elastic-hold-plate-1
1283, 1284, 1285, 1286, 1287, 1288
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*Elset, elset=xsymm_side, instance=elastic-hold-plate-1
883,  884,  885,  886,  887,  888
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*Nset, nset=ysymm_side, instance=elastic-hold-plate-1
1783, 1787, 1793, 1805, 1820, 1831
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*Elset, elset=ysymm_side, instance=elastic-hold-plate-1
1229, 1230, 1231, 1232, 1233, 1234
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*Nset, nset=zsymm_side, instance=elastic-hold-plate-1
1,    3,    4,    6,    7,    9
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*Elset, elset=zsymm_side, instance=elastic-hold-plate-1, generate
1,  3026,     1
*Elset, elset=_Surf-1_S5, internal, instance=elastic-hold-plate-1
41,  42,  83,  84, 125, 126
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*Elset, elset=_Surf-1_S6, internal, instance=elastic-hold-plate-1, generate
715,  1072,    21
*Surface, type=ELEMENT, name=Surf-1
_Surf-1_S5, S5
_Surf-1_S6, S6
*End Assembly
**
** MATERIALS
**
*Material, name=thermomechanical
*Density
1.,
*Depvar
  37,
1, AR1_sig11, AR1_sig11
2, AR2_sig22, AR2_sig22
3, AR3_sig33, AR3_sig33
4, AR4_sig12, AR4_sig12
5, AR5_sig13, AR5_sig13
6, AR6_sig23, AR6_sig23
7, AR7_stran11, AR7_stran11
8, AR8_stran22, AR8_stran22
9, AR9_stran33, AR9_stran33
10, AR10_stran12, AR10_stran12
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37, AR37_dCT_deqplas, AR37_dCT_deqplas
*User Defined Field
*User Material, constants=40, type=THERMAL
**
** =============================
**
** HYDROGEN DIFFUSION PROPERTIES
**
1.0e0, 1, 2.866e-10, 3.571e-10, 6.0e0, 1.0e0, 8.31446e0, 1
** scaling_factor - SFD (dimless), crystal_structure (1 - BCC | 2 - FCC), Lattice parameter for BCC - a_lattice_BCC (m), Lattice parameter for FCC - a_lattice_FCC (m)
** Number of hydrogen atoms that can reside in each BCC lattice site - beta_BCC (dimless), Number of hydrogen atoms that can reside in each FCC lattice site - beta_FCC (dimless), Universal gas constant - R (N*m)/(mol*K), Temperature mode (1 - constant | 2 - predefined field)
300.0e0, 2e-06, 1, 1.12987e-10, 1.07964e-9, 5630, 8.518e+28, 6.02214e+23
** Temperature - T (K), Partial molar volume - VH (m^3/mol), Coefficient formula (1 - directly using DL | 2 - using DL = DL0 * exp(-WB_L/RT)), Diffusion coefficient - DL (m^2/s)
** Pre-exponentiation factor for coefficient - DL0 (m^2/s), Activation energy for jumping between lattice sites - WB_L (N*m/mol) , Number of solvent metal atoms per unit volume - NL (1/m^3), Avogadro's constant - avogadro (1/mol)
30000.0e0, 20.0e0, 0.0e0, 3, 1, 2, 2.0e+16, 1.0e+10
** Gibbs free energy difference between the decohering interface and the surrounding material - delta_g_b0 (N*m/mol), Initial total hydrogen concentration - C0_mol (mol/m^3), Initial chemical potential - mu0 (J/mol), ntrap (0 - no traps | 1 - dislocation | 2 - 5 - more trap types)
** Equilibrium equation (1 - Oriani's equation | 2 - McNabb-Foster's equation), dis_trap_mode (1 - kumnick, krom | 2 - sofronis, dadfarnia), gamma fitting parameter in Dadfarnia et al. - gamma (1/m^2), Dislocation density for the annealed material in Dadfarnia et al. - rho_d0 (1/m^2)
1.0e0,  -20.2e+3, 1.0e0, 8.464e+22, -58.6e+3, 1.0e0, 8.464e+26, -11.5e+3
** Number of interstitial sites per trap site (dislocations) - alpha_1 (dimless), Binding energy of hydrogen to dislocations - WB_1 (N*m/mol), Number of interstitial sites per trap site (trap type 2) - alpha_2 (dimless), Number of traps (trap type 2) - NT_2 (1/m^3)
** Binding energy of hydrogens (trap type 2) - WB_2 (N*m/mol), Number of interstitial sites per trap site (trap type 3) - alpha_3 (dimless), Trap density (trap type 3) - NT_3 (1/m^3), Binding energy of hydrogens (trap type 3) - WB_3 (N*m/mol)
0, 0, 0, 0, 0, 0, 0.0, 0.0
** Number of interstitial sites per trap site (trap type 4) - alpha_4 (dimless), Trap density (trap type 4) - NT_4 (1/m^3), Binding energy of hydrogens (trap type 4) - WB_4 (N*m/mol), Number of interstitial sites per trap site (trap type 5) - alpha_5 (dimless)
** Trap density (trap type 5) - NT_5 (1/m^3), Binding energy of hydrogens (trap type 5) - WB_5 (N*m/mol), none, none
**
*******************************************************
*User Material, constants=208, type=MECHANICAL
**
** =====================
**
** MECHANICAL PROPERTIES
**
1, 210.0e+9, 0.3e0, 0.0, 0.0, 0.0, 0.0, 0.0
** scaling_factor - SFD (dimless), Young's modulus - E (Pa), Poisson ratio - nu (dimless), none
** none, none, none, none
**
** =====================
**
** FLOW CURVE PROPERTIES
**
** True stress (Pa) - PEEQ (dimless) value pairs
869678161.0449681, 0.00e+00, 871526750.9057986, 2.00e-04, 873375340.766629, 4.00e-04, 875223930.6274595, 6.00e-04
877072520.48829, 8.00e-04, 878921110.3491204, 1.00e-03, 888164059.6532726, 2.00e-03, 897407008.9574249, 3.00e-03
906649958.2615771, 4.00e-03, 915892907.5657294, 5.00e-03, 925135856.8698816, 6.00e-03, 934378806.1740339, 7.00e-03
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1260425937.332496, 2.85e+00, 1262132630.438223, 2.90e+00, 1263820905.377339, 2.95e+00, 1265491268.102705, 3.00e+00
**
*******************************************************
*User Output Variables
16,
**
** PREDEFINED FIELDS
**
** Name: Cbar_L   Type: Temperature
*Initial Conditions, type=TEMPERATURE
whole_part, 20.
** ----------------------------------------------------------------
**
** STEP: Step-1
**
*Step, name=Step-1, nlgeom=YES, inc=10000000
*Coupled Temperature-displacement, creep=none, deltmx=10.
5e+06, 1e+10, 1e+06, 1e+07
**
** BOUNDARY CONDITIONS
**
** Name: Xsymm Type: Symmetry/Antisymmetry/Encastre
*Boundary
xsymm_side, XSYMM
** Name: Ysymm Type: Symmetry/Antisymmetry/Encastre
*Boundary
ysymm_side, YSYMM
** Name: Zsymm Type: Symmetry/Antisymmetry/Encastre
*Boundary
zsymm_side, ZSYMM
**
** LOADS
**
** Name: Load-1   Type: Pressure
*Dsload
Surf-1, P, -1e+08
**
** PREDEFINED FIELDS
**
** Name: UFIELD   Type: Field
*Field, variable=1, user
whole_part
*SOLVER CONTROLS
1e-05,  ,  ,
*CONTROLS, PARAMETERS=FIELD, FIELD=DISPLACEMENT
 ,  ,  ,  ,  ,  ,  ,  ,
 ,  ,  ,
*CONTROLS, PARAMETERS=FIELD, FIELD=TEMPERATURE
5e-12, 1e-09,  ,  ,  , 1e-12,  ,  ,
 , 1e-12,  ,
*CONTROLS, PARAMETERS=CONSTRAINTS
 ,  ,  ,  ,  ,  ,  ,  ,
*CONTROLS, PARAMETERS=TIME INCREMENTATION
16, 8, 9, 16, 10, 16, 12, 100,  ,  ,  ,  ,  ,
 ,  ,  ,  ,  ,  ,  ,  ,
 ,  ,  ,  ,  ,  ,  ,  ,
 ,
*CONTROLS, PARAMETERS=LINE SEARCH
10,  ,  ,  ,  ,
**
** OUTPUT REQUESTS
**
*Restart, write, frequency=0
**
** FIELD OUTPUT: F-Output-1
**
*Output, field
*Node Output
COORD, NT, RF, U
*Element Output, directions=YES
COORD, LE, S, SDV, UVARM
*Output, history, frequency=0
*End Step
